<Lems>

  <!-- Tell jLEMS/jNeuroML which component is the simulation entry point. -->
  <Target component="sim_JansenRit_LEMS_Export"/>

  <Include file="Cells.xml"/>
  <Include file="Networks.xml"/>
  <Include file="Simulation.xml"/>

  <!-- ════════════════════════════════════════════════════════════════
       Dynamics ComponentType & Component instances
       ════════════════════════════════════════════════════════════════ -->

  <!-- ════════════════════════════════════════════════════════════════
       ComponentType: JansenRit
       Generated from TVBO Dynamics: JansenRit
       ════════════════════════════════════════════════════════════════ -->
  <ComponentType name="JansenRit">

    <!-- Parameters -->
    <Parameter name="A" dimension="none"/>
    <Parameter name="B" dimension="none"/>
    <Parameter name="J" dimension="none"/>
    <Parameter name="a_1" dimension="none"/>
    <Parameter name="a_2" dimension="none"/>
    <Parameter name="a_3" dimension="none"/>
    <Parameter name="a_4" dimension="none"/>
    <Parameter name="a" dimension="none"/>
    <Parameter name="b" dimension="none"/>
    <Parameter name="mu" dimension="none"/>
    <Parameter name="nu_max" dimension="none"/>
    <Parameter name="r" dimension="none"/>
    <Parameter name="v0" dimension="none"/>
    <!-- Coupling inputs -->
    <Parameter name="c_pop0" dimension="none"/>
    <Parameter name="local_coupling" dimension="none"/>
    <!-- Initial condition parameters -->
    <Parameter name="y0_0" dimension="none"/>
    <Parameter name="y1_0" dimension="none"/>
    <Parameter name="y2_0" dimension="none"/>
    <Parameter name="y3_0" dimension="none"/>
    <Parameter name="y4_0" dimension="none"/>
    <Parameter name="y5_0" dimension="none"/>

    <!-- Time constant for derivatives.
         All parameters use dimension="none" to avoid jLEMS dimensional
         analysis failures (neural-mass models mix units freely).
         / SEC is always applied so the TimeDerivative has per_time
         dimension.  When the model already has time units in parameters,
         SEC = 1s (numerically 1.0 — identity); otherwise SEC = 1<time_scale>
         provides the actual numeric conversion.
         needs_sec=True  time_scale=ms -->
    <Constant name="SEC" dimension="time" value="1ms"/>

    <!-- Exposures (one per state variable) -->
    <Exposure name="y0" dimension="none"/>
    <Exposure name="y1" dimension="none"/>
    <Exposure name="y2" dimension="none"/>
    <Exposure name="y3" dimension="none"/>
    <Exposure name="y4" dimension="none"/>
    <Exposure name="y5" dimension="none"/>

    <Dynamics>

      <!-- State variables -->
      <StateVariable name="y0" dimension="none" exposure="y0"/>
      <StateVariable name="y1" dimension="none" exposure="y1"/>
      <StateVariable name="y2" dimension="none" exposure="y2"/>
      <StateVariable name="y3" dimension="none" exposure="y3"/>
      <StateVariable name="y4" dimension="none" exposure="y4"/>
      <StateVariable name="y5" dimension="none" exposure="y5"/>

      <!-- Derived variables (simple and conditional/piecewise) -->
      <DerivedVariable name="sigma_y0_1" dimension="none" value="2.0*nu_max/(1.0 + exp(r*(v0 - J*a_1*y0)))"/>
      <DerivedVariable name="sigma_y0_3" dimension="none" value="2.0*nu_max/(1.0 + exp(r*(v0 - J*a_3*y0)))"/>
      <DerivedVariable name="sigma_y1_y2" dimension="none" value="2.0*nu_max/(1.0 + exp(r*(v0 + y2 - y1)))"/>

      <!-- ── Flat dynamics (no spike events) ── -->

      <!-- Time derivatives -->
      <TimeDerivative variable="y0" value="(y3) / SEC"/>
      <TimeDerivative variable="y1" value="(y4) / SEC"/>
      <TimeDerivative variable="y2" value="(y5) / SEC"/>
      <TimeDerivative variable="y3" value="(-y0*a^2 - 2.0*a*y3 + A*a*sigma_y1_y2) / SEC"/>
      <TimeDerivative variable="y4" value="(-y1*a^2 - 2.0*a*y4 + A*a*(c_pop0 + mu + local_coupling*(y1 - y2) + J*a_2*sigma_y0_1)) / SEC"/>
      <TimeDerivative variable="y5" value="(-y2*b^2 - 2.0*b*y5 + B*J*a_4*b*sigma_y0_3) / SEC"/>

      <!-- Initial conditions -->
      <OnStart>
        <StateAssignment variable="y0" value="y0_0"/>
        <StateAssignment variable="y1" value="y1_0"/>
        <StateAssignment variable="y2" value="y2_0"/>
        <StateAssignment variable="y3" value="y3_0"/>
        <StateAssignment variable="y4" value="y4_0"/>
        <StateAssignment variable="y5" value="y5_0"/>
      </OnStart>

      <!-- Events (non-spike) -->

    </Dynamics>

  </ComponentType>

  <!-- ════════════════════════════════════════════════════════════════
       Component instances (default parameter values)
       ════════════════════════════════════════════════════════════════ -->
  <Component id="JansenRit_inst" type="JansenRit" A="3.25" B="22.0" J="135.0" a_1="1.0" a_2="0.8" a_3="0.25" a_4="0.25" a="0.1" b="0.05" mu="0.22" nu_max="0.0025" r="0.56" v0="5.52" c_pop0="0" local_coupling="0" y0_0="0.1" y1_0="0.1" y2_0="0.1" y3_0="0.1" y4_0="0.1" y5_0="0.1"/>

  <!-- Wrap the single cell in a network so quantity paths use the standard
       pop[idx]/variable form, which works across jNeuroML, NEURON, Brian2,
       NetPyNE and EDEN backends. -->
  <network id="net">
    <population id="pop" component="JansenRit_inst" size="1"/>
  </network>

  <!-- ════════════════════════════════════════════════════════════════
       Simulation — target the network (all-backend compatible)
       ════════════════════════════════════════════════════════════════ -->
  <Simulation id="sim_JansenRit_LEMS_Export" length="1000.0ms" step="0.01220703125ms" target="net">

    <OutputFile id="of1" fileName="results/JansenRit.dat">
      <OutputColumn id="y0" quantity="pop[0]/y0"/>
      <OutputColumn id="y1" quantity="pop[0]/y1"/>
      <OutputColumn id="y2" quantity="pop[0]/y2"/>
      <OutputColumn id="y3" quantity="pop[0]/y3"/>
      <OutputColumn id="y4" quantity="pop[0]/y4"/>
      <OutputColumn id="y5" quantity="pop[0]/y5"/>
    </OutputFile>

  </Simulation>

</Lems>
